// COMSOL Multiphysics 5.4.0.388 model "19332 ECS 322_HW10.mph"
// Outline of the model tree

Coordinate systems
  ie2: InfiniteElement "Infinite Element Domain 2" on all domains

Geometry
  geom1 "Geometry 1" (3D, length unit m)
    sph1: Sphere | layername = {Layer 1, Layer 2, Layer 3}; layer = {0.4, 0.5, 0.1}; r = 1.1
    fin: Finalize "Form Union"

Materials
  mat1: Common "Material 1" on all domains
    def "Basic"
      relpermittivity = 1

Physics
  es: Electrostatics on all domains
    dependent variable V
    ccn1: ChargeConservation (default)
    zc1: ZeroCharge (default)
    init1: init "Initial Values 1" (default)
    scd1: SpaceChargeDensity on domains 1-25 | rhoq = 1
    pot1: ElectricPotential on boundaries 1-68

Mesh
  mesh1 "Mesh 1"
    size: MeshSizeDefault | hmax = 0.22; hmin = 0.0396; hcurve = 0.6; hnarrow = 0.5; hgrad = 1.5
    ftet1: FreeTet "Free Tetrahedral 1" on domains 1-25
    swe1: Sweep "Swept 1" on all domains

Studies
  std1 "Study 1"
    stssw: StationarySourceSweep

Solver configurations
  sol1 "Solution 1" (study std1)

Datasets
  dset1: Solution | solution = sol1