// COMSOL Multiphysics 5.4.0.388 model "19332_ECS 322_HW10.mph"
// Outline of the model tree

Selections
  sel1: Explicit on domains 2, 11 | angletol = 0.0872664625997

Coordinate systems
  ie1: InfiniteElement "Infinite Element Domain 1" on domains 1-4, 10, 11, 14, 17 | ScalingType = Spherical

Geometry
  geom1 "Geometry 1" (3D, length unit m)
    sph1: Sphere | layername = {Layer 1, Layer 2}; layer = {0.4, 0.5}
    fin: Finalize "Form Union"

Materials
  mat1: Common "Material 1" on all domains
    def "Basic"
      relpermittivity = 1

Physics
  es: Electrostatics on all domains
    dependent variable V
    ccn1: ChargeConservation (default) | materialType = solid
    zc1: ZeroCharge (default)
    init1: init "Initial Values 1" (default)
    scd1: SpaceChargeDensity on domains 9 | rhoq = 1
    pot1: ElectricPotential on boundaries 5-8, 24, 25, 35, 46

Mesh
  mesh1 "Mesh 1"
    size: MeshSizeDefault | hmax = 0.2; hmin = 0.036; hcurve = 0.6; hnarrow = 0.5; hgrad = 1.5
    dis1: Distribution on edges 1, 15, 26, 37, 44, 48 | type = predefined
    ftet1: FreeTet "Free Tetrahedral 1" on domains 5-9, 12, 13, 15, 16
    swe1: Sweep "Swept 1" on domains 1-4, 10, 11, 14, 17
      dis1: Distribution on domains 1-4, 10, 11, 14, 17

Studies
  std1 "Study 1"
    stat: Stationary

Solver configurations
  sol1 "Solution 1" (study std1)
    v1: Variables "Dependent Variables 1"
    s1: Stationary "Stationary Solver 1"
      fc1: FullyCoupled | linsolver = i1
      i1: Iterative | linsolver = cg
        mg1: Multigrid | prefun = amg

Datasets
  dset1: Solution | solution = sol1
  cln1: CutLine3D | data = dset1; genpoints = {{0, 0, 0}, {0, 0, 1}}
  cln2: CutLine3D | data = dset1; genpoints = {{0, 0, -1}, {0, 0, 1}}
  cln3: CutLine3D | data = dset1; genpoints = {{0, 0, -1}, {0, 0, 1}}
  cln4: CutLine3D | data = dset1; genpoints = {{0, 0, -1}, {0, 0, 1}}
  cln5: CutLine3D | data = dset1; genpoints = {{0, 0, -1}, {0, 0, 1}}

Plots
  pg1: PlotGroup3D "Electric Potential (es)" | data = dset1
    mslc1: Multislice | expr = V
  pg2: PlotGroup3D "3D Electric Field" | data = dset1
    mslc1: Multislice | expr = es.normE; descr = Electric field norm
  pg3: PlotGroup3D "3D Electric Potential" | data = dset1
    mslc1: Multislice | expr = V; descr = Electric potential
  pg4: PlotGroup1D "Electric Field/Potential" | data = dset1
    lngr1: LineGraph "Potential" | data = cln1; expr = V; xdata = expr; xdataexpr = z
    lngr2: LineGraph "Field" | data = cln1; expr = es.normE; descr = Electric field norm; xdata = expr; xdataexpr = z
  pg5: PlotGroup1D "Electric Potential" | data = dset1
    lngr1: LineGraph | data = cln1; expr = V; xdata = expr; xdataexpr = z
  pg6: PlotGroup1D "Electric Field" | data = dset1
    lngr1: LineGraph | data = cln1; expr = es.normE; descr = Electric field norm; xdata = expr; xdataexpr = z